A := [
    0.58993, 0.036004, -0.32946, 0.27315;
    -4.3515, -0.24076, 2.2030, -2.0148;
    6.7688, 0.39005, -3.5692, 3.1341;
    -31.085, -1.7198, 15.737, -14.393
]
B := [1, 0, 0, 0; 0, 1, 0, 0; 0, 0, 1, 0; 0, 0, 0, 1]
eigenvals(A) = [-3.77522e-6 + 3.87197e-6i; -3.77522e-6 - 3.87197e-6i; -0.125195; -17.4878]
eigenvecs(A) = [
    -0.0523709 - 0.0504019i, -0.0523709 + 0.0504019i, -0.196385, -0.0187624;
    0.979102, 0.979102, -0.0689499, 0.135441;
    0.106967 + 9.87242e-7i, 0.106967 - 9.87242e-7i, -0.843848, -0.212535;
    0.113072 + 0.108856i, 0.113072 - 0.108856i, -0.49457, 0.967539
]
