x := [1; 2; 3; 4; 5; 6; 7; 8; 9; 10; 11; 12; 13; 14; 15; 16; 17; 18; 19; 20]
y := [0.17; 0.07; 0.17; 0.05; 0.12; 0.00; 0.01; -0.05; -0.21; -0.50; -0.50; -0.86; -1.24; -1.47; -1.79; -2.25; -2.55; -3.18; -3.60; -3.93]
s := cspline(x, y)
A(t) := interp(s, x, y, t)
# [plot: A(x) vs x]
